**
*HEADING
**
**
**
**
*NODE
1,	15.0,	0.0,	0.0
2,	14.942920471376183,	1.3073361412148725,	0.0
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**
** SOLID ELEMENTS
**
*ELEMENT, TYPE=C3D8H, ELSET=SOLID_RUBBER
364,	364,	436,	437,	365,	1588,	1660,	1661,	1589
365,	365,	437,	438,	366,	1589,	1661,	1662,	1590
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*ELEMENT, TYPE=C3D8, ELSET=SOLID_METAL
1081,	1081,	1153,	1154,	1082,	2305,	2377,	2378,	2306
1082,	1082,	1154,	1155,	1083,	2306,	2378,	2379,	2307
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**
**
**
**
** SECTION DATA
**
*SOLID SECTION, ELSET=SOLID_METAL, MATERIAL=METAL
*SOLID SECTION, ELSET=SOLID_RUBBER, MATERIAL=RUBBER
*SOLID SECTION, ELSET=SOLID_HIDE, MATERIAL=HIDE
**
** MATERIALS
**
**
**METAL
**
*MATERIAL, NAME=METAL
*DENSITY
                 7.85E-9,
*ELASTIC, TYPE=ISOTROPIC
                 210000.,                      0.3
**
**RUBBER
**
*MATERIAL, NAME=RUBBER
*DENSITY
                 7.85E-9,
*ELASTIC, TYPE=ISOTROPIC
                      2.,                    0.495
